# Лаб. работа #2, Вариант 9.
#
# 424-1, Бадулин Илья, Ушаков Максим.
#
# Задача 1 «Проверка статистических гипотез»
#
# Крупный коммерческий банк заказал маркетинговое исследование по выявлению эффекта «премирования» (калькулятор, набор ручек и др.) как стимула для открытия счета в банке. Для проверки случайным образом было отобрано 200 «премированных» посетителей и 200 «не премированных». В результате выяснилось, что 79 % посетителей, которым не предлагалась премия, и 89 % посетителей, которым премия предлагалась, открыли счет в банке в течение 6 мес. Используя эти данные, проверьте гипотезу о том, что доля «премированных» посетителей, открывших счет в банке, существенно отличается от удельного веса «не премированных», открывших счет. Уровень значимости α = 0.05.
# Решение
#
# H_0: p_1​ == p_2​ (доли открывших счёт одинаковы).
# H_1: p_1​ != p_2​ (доли различаются).
#
# Выберем гипотезу о генеральной доле.
α := 0.05
n1 := 200
n2 := 200
p1 := 0.89
p2 := 0.79
m1 := n1*p1
m2 := n2*p2
p := (m1 + m2)/(n1 + n2) = 0.84
K_набл := (p1 - p2)/sqrt(p*(1 - p))*sqrt(n1*n2/(n1 + n2)) = 2.72772
# Φ(K крит) = (1 - α) / 2 = 0.45 --> К крит = 1.96
#
# Форма (K крит) -- двусторонняя альтернатива, т.к. H_1: p1​!= p2​
# Область допустимых значений имеет вид (-1.96; 1.96)
#
# Наблюдаемое значение K_набл = 2.728 не попадает в этот интервал, т.е. на данном уровне значимости основная гипотеза отвергается в пользу альтернативной.
#
# Ответ:
# Доля посетителей, открывших счёт, в группе, получившей премию (89%), статистически значимо отличается от доли в группе без премии (79%). Таким образом, премирование оказывает существенное влияние на решение об открытии счёта.
# Задача 2 «Критерий согласия Пирсона»
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n_overall := 32
k := 6
a[1] := 1.2
a[2] := 1.6
a[3] := 2.0
a[4] := 2.4
a[5] := 2.8
a[6] := 3.2
a[7] := 3.6
n[1] := 3
n[2] := 5
n[3] := 8
n[4] := 10
n[5] := 4
n[6] := 2
j := 1 .. 6
z[j] := (a[j] + a[j + 1])/2
z[j] = [1.4; 1.8; 2.2; 2.6; 3; 3.4]
x := 1/n_overall*sum(n[j]*z[j], j = 1 .. k) = 2.3625
s_square := 1/(n_overall - 1)*sum(n[j]*(z[j] - x)^2, j = 1 .. k) = 0.287581
s := sqrt(s_square) = 0.536265
# 2 часть задачи:
#
# С помощью критерия согласия Пирсона на уровне значимости α = 0.05 выяснить, можно ли считать случайную величину X нормально распределенной с параметрами x и s рассчитанными по выборке.
α := 0.05
# K ~ χ^2_((k - r - 1))
#
# Т.к.  X ~ N(a, σ) , то r = 2
r := 2
# H_0: X ~ N(a, σ)
# H_1: X != N(a, σ)
p[j] := pnorm(a[j + 1], x, s) - pnorm(a[j], x, s)
p[j] = [0.0624438; 0.171998; 0.278345; 0.264826; 0.148123; 0.0486662]
K_набл := sum((n[j] - n_overall*p[j])^2/(n_overall*p[j]), j = 1 .. k) = 1.15674
K_крит := qchisq(1 - α, k - r - 1) = 7.81473
# Так как K_набл = 1.157 <= К_крит = 7.815 , гипотеза H_0 принимается, как непротиворечащая
# опытным данным.
#
# Ответ:
# Случайную величину X можно считать нормально распределенной с x = 2.362, s = 0.536
# на уровне значимости α = 0.05.
# Задача 3. Используя критерии знаков. Уровень значимости a = 0.05.
# Проверка гипотезы об однородности двух выборок
# H0: F1(x) = F2(x)
# H1: F1(x) != F2(x)
alfa := 0.05
x := [6.61; 8.68; 10.26; 9.13; 5.84; 9.1; 6.22; 9.23; 10.96; 7.79; 6.9; 7.69; 7.11; 8.65; 9.55; 8.75; 9.25; 5.52]
y := [9.14; 8.3; 7.84; 6.29; 7.48; 5.45; 8.55; 9; 8.34; 6.81; 8.56; 8.28; 8.1; 8.33; 8.57; 8.74; 8.69; 6.12]
A := sign(x - y)
r01 := rows(match(-1, A))
r10 := rows(match(1, A))
min(r01, r10) = 7
r := min(r01, r10)
# При значении alfa = 0.05 и количестве элементов n = 18, a = 5
sign(x - y) = [-1; 1; 1; 1; -1; 1; -1; 1; 1; 1; -1; -1; -1; 1; 1; 1; 1; -1]
ra := 5
r > ra = 1  # из чего нет оснований отвергать H0
# Задача 4. Используя критерии Вилкоксона Уровень значимости a = 0.02.
# Проверка гипотезы об однородности двух выборок
# H0: F1(x) = F2(x)
# H1: F1(x) != F2(x)
alfa := 0.02
ORIGIN := 1
x := [6.61; 8.68; 10.26; 9.13; 5.84; 9.1; 6.22; 9.23; 10.96; 7.79; 6.9; 7.69; 7.11; 8.65; 9.55; 8.75; 9.25; 5.52]
y := [9.14; 8.3; 7.84; 6.29; 7.48; 5.45; 8.55; 9; 8.34; 6.81; 8.56; 8.28; 8.1; 8.33; 8.57; 8.74; 8.69; 6.12]
stack(x, y) = [
    6.61; 8.68; 10.26; 9.13; 5.84; 9.1; 6.22; 9.23; 10.96; 7.79
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]
z := stack(x, y)
n := min(rows(x), rows(y))
Z1 := Rank(z)
n = 18
Knabl := sum(Z1[i], i = 1 .. n)
n0 := rows(z)
n0 = 36
Knabl = 364
Rank(z) = [
    7; 24; 35; 30; 3; 29; 5; 32; 36; 13
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]
n*(n0 + 1)/2 = 333
srs := n*(n0 + 1)/2
# По таблице крит. значений Вилкоксона
a := 185
Kmin := srs - a
Kmin = 148
Kmax := srs + a
Kmax = 518
Kmin < Knabl < Kmax
# Нет оснований отвергать нулевую гипотезу
# об однородности выборок
