# 2 Задание
# Нам необходимо найти значение следующего интеграла:
a := 3
b := 5
I := integral(sqrt(x^3 + 2), x = 3 .. 5) = 16.3831
# Представим данный интеграл в виде: ∫h(x)f(x)dx
f := 1/(b - a) = 0.5
h(x) := (b - a)*sqrt(x^3 + 2)
# Определим заднные точность и доверительную вероятность
ε := 0.03
β := 0.96
# Оценим количество опытов:
t_est := qnorm(β/2 + 0.5, 0, 1) = 2.05375
# квантиль, соответствующей заданной
# доверительной вероятности
# В качестве СКО возьмём его грубую оценку
σ := (h(5) - h(3))/6 = 1.96142
n := ceil((t_est*σ/ε)^2) = 18030  # Минимальное кол-во опытов
# Сгенерируем n случайных чисел, и с помощью формулы преобразуем для нашего диапазона
n := 55000
i := 1 .. n
γ[i] := rnd(1)
x[i] := a + (b - a)*γ[i]
# Вычислим оценку интеграла:
I_est := 1/n*sum(h(x[i]), i) = 16.399
# Вычислим оценку дисперсии
D_est := 1/n*sum(h(x[i])^2, i) - I_est^2 = 11.6428
# Найдём точность и сравним с данной:
ε_0 := t_est*sqrt(D_est)/sqrt(n) = 0.0298809
# Разница между точностями составляет
ε_0 - ε = -0.000119063
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# Запишем значение интеграла в доверительном интервале
[I_est - ε_0, I_est + ε_0] = [16.3691, 16.4289]
