# Лабораторная работа №3  Вариант 5
# Работу выполнили:
# Магеррамов Ф.О.
# Лепехин Н.А.
# 1 Задание
# Зададим начальное число и количество генерируемых чисел
γ[0] := 0.95267921
n := 100
k := 4
# Напишем функцию нахождения дробной части числа, как число минус целая часть числа
fraction(x) := x - floor(x)
# Далее напишем итеративную формулу метода Неймана (середин квадратов)
i := 1 .. n
γ[i] := fraction(10^(-2*k)*floor(10^(3*k)*γ[i - 1]^2))
# Изобразим точечный график полученных псевдослучайных чисел
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# Сделаем проверку на равномерность распределения путем сравнения статистических параметров
M := 1/n*sum(γ[i], i) = 0.492183
# это оценочное математическое ожидание достаточно близко к значению 0.5, что соответсвует мат. ожиданию равномерного распределения
# эта оценочная дисперся достаточно близка к значению 0.0833, что соответсвует дипрессии равномерного распределения
D := sum((γ[i] - M)^2, i)/n = 0.090956
σ := sqrt(D) = 0.301589  # это оценочное С.К.О достаточно близко к значению 0.2887, что соответсвует С.К.О равномерного распределения
# Проведем частотный тест:
left_bound := M - σ = 0.190594
right_bound := M + σ = 0.793772
interval := [left_bound; right_bound]
hist(interval, γ)/n = [0.55]  # 60% чисел попали в интервал (m-σ; m+σ), что достаточно близко к 57.7%, характерным для равномерного распределения
hist([0; 0.5], γ) = [55]
# Количество чисел, попавших в интервал (0; 0.5) примерно равно количеству чисел, попавших в интервал (0.5; 1). Погрешность в 6 будем считать результатом малой выборки.
hist([0.5; 1], γ) = [46]
f := hist(transpose([0, 0.1, 0.2, 0.3, 0.4, 0.5, 0.6, 0.7, 0.8, 0.9, 1]), γ)
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# Сформулируем основную и альтернативную гипотезу:
# H0: X ~ R(0,1)
# H1: X != R(0,1)
# Оценим качество с помощью критерия Пирсона
p := 0.1
α := 0.05
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K_obs := sum((f[j] - n*p)^2/(n*p), j = 0 .. 9) = 6.3
K_crit := qchisq(1 - α, 9) = 16.919
