# Лаб. работа #3, Вариант 9.
#
# 424-1, Бадулин Илья, Ушаков Максим.
# Задание #1
# Начальное число | Количество генерируемых чисел
γ[0] := 0.89431234
n := 100
k := 4
# Функция дающая дробную часть числа
дробн(x) := x - floor(x)
# Метод Неймана (середин квадратов)
i := 1 .. n
γ[i] := дробн(10^(-2*k)*floor(10^(3*k)*γ[i - 1]^2))
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# Проверка на равномерность распределения путем сравнения статистических параметров:
M := 1/n*sum(γ[i], i) = 0.509973
# Оценочное математическое ожидание примерно соответсвует равномерному распределению 0.5
D := sum((γ[i] - M)^2, i)/n = 0.0810736
# Оценочная дисперсия примерно соответсвует дисперсии равномерного распределения 0.0833
σ := sqrt(D) = 0.284734
# Оценочное С.К.О примерно соответсвует С.К.О равномерного распределения 0.2887
# Частотный тест:
гран_лев := M - σ = 0.225238
гран_прав := M + σ = 0.794707
интервал := [гран_лев; гран_прав]
hist(интервал, γ)/n = [0.55]
# 55% чисел попали в интервал, это примерно соответствует показателю при равномерном распределении 57.7%
hist([0; 0.5], γ) = [49]
hist([0.5; 1], γ) = [52]
# Количество чисел, попавших в интервал (0; 0.5) примерно равно количеству чисел, попавших в интервал (0.5; 1)
f := hist(transpose([0, 0.1, 0.2, 0.3, 0.4, 0.5, 0.6, 0.7, 0.8, 0.9, 1]), γ)
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# Оценка качества с помощью критерия Пирсона:
p := 0.1
α := 0.05
k := 10
# Теоретическая вероятность попадания случайного числа от 0 до 1 в i-й интервал (0, 0.1, ... 0,9 ,1)
# Гипотезы:
# H0: X ~ R(0,1) (соответствует равномерному распределению)
# H1: X != R(0,1)
K_набл := sum((f[j - 1] - n*p)^2/(n*p), j = 1 .. k) = 2.1
K_крит := qchisq(1 - α, k - 1) = 16.919
# Число степеней свободы.
# Для равномерного распределения r = k − 1
# [component: outputs Табл]
# Задание #2
Дано
b := 0.95
e := 0.04
A := 2
B := 4
I := integral(x^2 - sqrt(x^2 - 1), x = A .. B) = 13.026
# Приводим к интеграллу с плотностью
p := 1/(B - A) = 0.5
-Плотность
h(x) := 1/p*(x^2 - sqrt(x^2 - 1))
f(x) := p
I := integral(f(x)*h(x), x = A .. B) = 13.026
# Находим минимальное число испытаний (n) гарантирующее с
# доверительной вероятностью β ошибку не большую чем ε
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# График монотонно возрастает на промежутке от 2 до 4
# поэтому
minh := h(2) = 4.5359
maxh := h(4) = 24.254
r := maxh - minh = 19.7181
q := r/6 = 3.28636  # Грубая оценка сигмы по размаху
# Найдем n
t := qnorm(b/2 + 0.5, 0, 1) = 1.95996
n := ceil((t*q/e)^2) = 25931  # Минимальное число испытаний
# Сгенерируем n случайных чисел, и с помощью формулы преобразуем для нашего диапазона
i := 1 .. n
n := 78000
γ[i] := rnd(1)
x[i] := A + (B - A)*γ[i]
# Вычислим оценку интеграла:
I := 1/n*sum(h(x[i]), i) = 4.35191
# Вычислим оценку дисперсии
D := 1/n*sum(h(x[i])^2, i) - I^2 = 48.913
# Вычислим разницу между точностями
re := t*sqrt(D)/sqrt(n) = 0.049081
re - e = 0.00908095
# № Опыта  кол-во опытов  оценка интегралла  оценка дисперсии  оценка точности  точность
# 1  18000  12.993  32.997  0.084  0.004
# 2  32000  13.054  32.79  0.063  0.004
# 3  55000  13.049  32.942  0.048  0.004
# 4  60000  13.014  32.933  0.046  0.004
# 5  78000  13.019  33.031  0.04  0.004
[I - re, I + re] = [4.30283, 4.401]
