# Лаб. работа #5, Вариант 9.
#
# 424-1, Бадулин Илья, Ушаков Максим.
# Часть 1 – Измерение корреляции несгруппированных данных
ORIGIN := 1
X := [0.04285; 0.8227; 1.428; 2.223; 5.301; 5.767; 6.016; 6.915; 7.279; 8.111; 8.551; 8.946; 9.315; 9.4; 9.54]
Y := [0.7698; 5.232; 5.244; 10.59; 17.88; 21.68; 20.16; 25.19; 23.83; 26.48; 30.05; 34.79; 35.06; 33.9; 34.8]
Rx := Rank(X) = [1; 2; 3; 4; 5; 6; 7; 8; 9; 10; 11; 12; 13; 14; 15]
Ry := Rank(Y) = [1; 2; 3; 4; 5; 7; 6; 9; 8; 10; 11; 13; 15; 12; 14]
n := length(X) = 15
# Расчет коэффициента Спирмена
rs := 1 - 6*sum((Rx[i] - Ry[i])^2, i = 1 .. n)/(n^3 - n) = 0.975
rs_check := Spear(X, Y)[4] = 0.975
# Проверка значимости коэффициента Спирмена
# H_0:  r_s == 0 (Монотонная корреляционная связь между X и Y отсутствует).
# H_1:  r_s != 0 (Существует значимая монотонная связь).
alfa := 0.01
K_nabl_S := rs*sqrt(n - 2)/sqrt(1 - rs^2) = 15.8206
K_tabl := qt(1 - alfa, n - 2) = 2.65031
# Вывол:
# Так как K_nabl_S > K_tabl --> гипотеза H0 об отсутствии связи отвергается. Между переменными X и Y существует весьма тесная положительная монотонная связь
# Расчет коэффициента Пирсона
rxy := (sum(X[i]*Y[i], i = 1 .. n) - n*mean(X)*mean(Y))/(sqrt(sum(X[i]^2, i = 1 .. n) - n*mean(X)^2)*sqrt(sum(Y[i]^2, i = 1 .. n) - n*mean(Y)^2)) = 0.990405
rxy_check := corr(X, Y) = 0.990405
# Проверка значимости коэффициента Пирсона
# H_0: r_xy == 0 (Линейная корреляционная связь отсутствует).
# H_1: r_xy != 0 (Существует значимая линейная связь).
alfa := 0.01
K_nabl_P := rxy*sqrt(n - 2)/sqrt(1 - rxy^2) = 25.8403
K_tabl := qt(1 - alfa, n - 2) = 2.65031
# Вывол:
# K_nabl_P > K_tabl --> Гипотеза H0​ отвергается. Есть наличие линейной положительной корреляционной зависимости между X и Y.
# Сила связи = 0.99 -- весьма тесная.
# Сравнение коэффициентов
rs = 0.975
rxy = 0.990405
# Коэффициент Пирсона получился немного выше (0.99 > 0.98). Это свидетельствует о том, что связь в исходных несгруппированных данных не просто монотонная, а имеет ярко выраженный линейный характер. Переход от реальных значений к рангам (при расчете по Спирмену) приводит к небольшой потере количественной информации об интервалах между точками, поэтому rs​ оказался чуть ниже, хотя всё равно демонстрирует весьма тесную связь.
# Часть 2 – Исследование корреляции сгруппированных данных
x := [12; 16; 20; 24; 28]
y := [7; 11; 15; 19; 23; 27]
nxy := [0, 0, 0, 0, 7, 8; 0, 0, 4, 11, 6, 0; 0, 0, 12, 26, 9, 0; 0, 3, 8, 0, 0, 0; 2, 4, 0, 0, 0, 0]
m := 5
k := 6
i := 1 .. m
j := 1 .. k
# Суммы по строкам | Суммы по столбцам | Общий объем выборки
nx[i] := sum(nxy[i, j], j = 1 .. k)
n := sum(nx[i], i = 1 .. m) = 100
ny[j] := sum(nxy[i, j], i = 1 .. m)
nx = [15; 21; 47; 11; 6]
ny = [2; 7; 24; 37; 22; 8]
# Вычисляем общие средние
xsr := sum(x[i]*nx[i], i = 1 .. m)/n = 18.88
ysr := sum(y[j]*ny[j], j = 1 .. k)/n = 18.76
# Вычисляем групповые средние Y по X
ysr_i[i] := sum(y[j]*nxy[i, j], j = 1 .. k)/nx[i]
ysr_i = [25.1333; 19.381; 18.7447; 13.9091; 9.66667]
Xdot := [12; 12; 16; 16; 16; 20; 20; 20; 24; 24; 28; 28]
Ydot := [23; 27; 15; 19; 23; 15; 19; 23; 11; 15; 7; 11]
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# Вывод:
# С ростом X значения Y падают, есть отрицательная и нелинейная корреляционная зависимость.
# Расчет коэффициента Пирсона для сгруппированных данных
rxy := (n*sum(sum(nxy[i, j]*x[i]*y[j], j = 1 .. k), i = 1 .. m) - sum(x[i]*nx[i], i = 1 .. m)*sum(y[j]*ny[j], j = 1 .. k))/(sqrt(n*sum(nx[i]*x[i]^2, i = 1 .. m) - sum(x[i]*nx[i], i = 1 .. m)^2)*sqrt(n*sum(ny[j]*y[j]^2, j = 1 .. k) - sum(y[j]*ny[j], j = 1 .. k)^2)) = -0.792797
# Проверка значимости коэффициента Пирсона
# H_0: r_xy == 0 (Линейная корреляционная связь отсутствует).
# H_1: r_xy != 0 (Существует значимая линейная связь).
alfa := 0.01
K_nabl_P := |rxy|*sqrt(n - 2)/sqrt(1 - rxy^2) = 12.8769
K_tabl := qt(1 - alfa, n - 2) = 2.365
# Вывол:
# 12.88 > 2.37. Гипотеза H0​ отвергается. Между X и Y существует статистически значимая отрицательная линейная связь
# Расчет эмпирического корреляционного отношения
ηyx := sqrt(sum((ysr_i[i] - ysr)^2*nx[i], i = 1 .. m)/sum((y[j] - ysr)^2*ny[j], j = 1 .. k)) = 0.832908
# Проверка значимости корреляционного отношения
# H_0: η = 0 (Зависимость Y от X полностью отсутствует).
# H_1: η > 0 (Между переменными существует статистическая зависимость любой формы).
alfa := 0.01
F_nabl_eta := ηyx^2*(n - m)/((1 - ηyx^2)*(m - 1)) = 53.7974
F_tabl_eta := qF(1 - alfa, m - 1, n - m) = 3.52323
# Вывол:
# 53.8 > 3.52. Гипотеза H0​ отвергается. Существует статистически значимая зависимость Y от X.
# Проверка гипотезы о линейности связи
# H_0: Связь линейная (Разница ηyx^2​ − rxy^2​ статистически незначима, то есть вызвана случайностью выборки).
# H_1: Связь нелинейная (Разница статистически значима, кривая регрессии существенно отклоняется от прямой).
alfa := 0.01
F_lin := (ηyx^2 - rxy^2)*(n - m)/((1 - ηyx^2)*(m - 2)) = 6.74241
F_tabl_lin := qF(1 - alfa, m - 2, n - m) = 3.9947
# Вывол:
# Так как F_lin ​> F_tabl_lin​ (6.74 > 3.99), нулевая гипотеза H0​ отвергается.
# Вывод по части 2:
# Несмотря на то, что коэффициент Пирсона выявил сильную линейную компоненту (rxy​ = −0.793), проверка на линейность показала, что связь всё-таки носит нелинейный характер.
# Это логично, если посмотреть на групповые средние, при переходе от X=16 к X=20 значение Y почти не меняется (падает всего на 0.6), в то время как на других участках падение составляет около 4.5 – 5 пунктов. Это "искривляет" линию регрессии.
