# Лаб. работа #6, Вариант 9.
#
# 424-1, Бадулин Илья, Ушаков Максим.
ORIGIN := 0
Y := transpose([7, 7, 7, 7, 8, 8, 9, 9, 10, 10, 11, 12])
X1 := transpose([3.9, 4.2, 4.3, 4.4, 4.6, 4.8, 5.3, 5.7, 6.9, 6.8, 7.1, 7.5])
X2 := transpose([12, 13, 15, 17, 18, 19, 19, 20, 21, 21, 22, 25])
i := 0 .. 11
X0[i] := 1
X := augment(X0, augment(X1, X2)) = [
    1, 3.9, 12;
    1, 4.2, 13;
    1, 4.3, 15;
    1, 4.4, 17;
    1, 4.6, 18;
    1, 4.8, 19;
    1, 5.3, 19;
    1, 5.7, 20;
    1, 6.9, 21;
    1, 6.8, 21;
    1, 7.1, 22;
    1, 7.5, 25
]
# Нахождение коэффициентов регрессионной модели матричным способом
# вектор коэффициентов b
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b := (transpose(X)*X)^-1*transpose(X)*Y = [1.37031; 1.05295; 0.0882351]
# Пояснение, что показывает уравнение регрессии
# Уравнение множественной линейной регрессии имеет вид: y = b_0 + b_1 * x_1 + b_2 * x_2
#
# b_0 -- свободный член, показывающий базовое значение выработки при нулевых значениях факторов.
#
# b_1 -- показывает, на сколько тысяч рублей в среднем изменится выработка продукции на одного работника (y) при увеличении ввода в действие новых основных фондов (x_1) на 1% при неизменном x_2.
#
# b_2 -- показывает, на сколько тысяч рублей в среднем изменится выработка (y) при увеличении удельного веса рабочих высокой квалификации (x_2) на 1% при неизменном x_1.
# Проверка значимости коэффициентов регрессии
# Гипотеза:
# H_0: b_i == 0 (коэффициент регрессии незначим)
# H_1: b_i != 0 (коэффициент регрессии значим)
k := 2
n := 12
α := 0.05
Y_mod := X*b = [6.53563; 6.93975; 7.22151; 7.50328; 7.8021; 8.10093; 8.6274; 9.13682; 10.4886; 10.3833; 10.7874; 11.4733]
e := Y - Y_mod = [0.464372; 0.0602524; -0.221513; -0.503278; 0.197898; -0.100927; 0.372599; -0.136815; -0.488587; -0.383293; 0.212588; 0.526703]
# оценка модельных значений и
# вектора остатков
Q := transpose(e)*e = 1.43677
# остаточная сумма квадратов и
# дисперсия ошибок
S2_e := Q/(n - (k + 1)) = 0.159641
C := (transpose(X)*X)^-1 = [2.29612, 0.10221, -0.149767; 0.10221, 0.31797, -0.0993404; -0.149767, -0.0993404, 0.0374054]
# матрица C и стандартные ошибки
# коэффициентов (i = 0, 1, 2)
S_b0 := sqrt(S2_e*C[0, 0]) = 0.605438
S_b1 := sqrt(S2_e*C[1, 1]) = 0.225302
S_b2 := sqrt(S2_e*C[2, 2]) = 0.077275
t[0] := |b[0]|/S_b0 = 2.26334  # наблюдаемые значения t-статистики
t[1] := |b[1]|/S_b1 = 4.67349
t[2] := |b[2]|/S_b2 = 1.14183
t_tabl := qt(1 - α/2, n - (k + 1)) = 2.26216
# табличное значение
# (квантиль распределения Стьюдента)
# Вывод:
# b_0 значимо отличается от 0, т.к. |t[0]| = 2.263 > t_tabl = 2.262
# b_1 значимо отличается от 0, т.к. |t[1]| = 4.673 > t_tabl = 2.262
# b_2 НЕ значимо отличается от 0, т.к. |t_2| = 1.142 < t_tabl = 2.262
# Построение доверительных интервалов для коэффициентов регрессионной модели
b0_mim := b[0] - t_tabl*S_b0 = 0.000714857
# доверительный интервал
# для параметров b_i имеет вид
# интервал не
# накрывает 0
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b0_max := b[0] + t_tabl*S_b0 = 2.73991
b1_mim := b[1] - t_tabl*S_b1 = 0.543279
# интервал не
# накрывает 0
b1_max := b[1] + t_tabl*S_b1 = 1.56262
b2_mim := b[2] - t_tabl*S_b2 = -0.0865731
# интервал
# накрывает 0 => статистически не значим
b2_max := b[2] + t_tabl*S_b2 = 0.263043
# Проверка адекватности модели
# Гипотеза:
# H_0: D_Y == D_ε (дисперсия зависимой переменной, обусловленная соответственно регрессией или объясняющими переменными, равна дисперсии, обусловленной воздействием неучтенных случайных факторов)
#
# H_1: D_Y > D_ε (вклад, вносимый в дисперсию совместным одновременным влиянием объясняющих переменных x_1, x_2,..., x_n выше суммарного эффекта от воздействия всех неучтенных случайных факторов)
Y_mean := mean(Y) = 8.75  # среднее значение Y
S2_y := (1/(n - 1))*sum((Y[i] - Y_mean)^2, i) = 2.93182  # общая дисперсия Y (несмещенная)
F_nabl := S2_y/S2_e = 18.3651  # наблюдаемое значение критерия
F_tabl := qF(1 - α, n - 1, n - (k + 1)) = 3.10249
# табличное значение F-критерия
# (Фишера-Снедекора)
# Вывод:
# Т.к. коэффициент b_2 статистически незначим и F_nabl > F_tabl (уравнение регрессии значимо)
# модель можно использовать для принятия решений, но НЕ ДЛЯ ПРОГНОЗА (модель может быть
# упрощена, необходимо построить модель с другими факторами).
# Построение диаграмы  рассеяния и графика модельной кривой
# Ось X (X1, x) - значения самого значимого фактора (ввод в действие новых основных фондов).
# Ось Y - выработка продукции.
# Точки - диаграмма рассеяния
# Линия - линия регрессии
X := X1
Y := Y
n := 12
# Standard deviation:
SD(x) := stdev(x)*sqrt(n/(n - 1))
# annotation to a formula above: Using Mathcad to perform linear regressions of X-Y data.
# X-Coordinates | Y-Coordinates
# Mean
mean(X) = 5.45833
mean(Y) = 8.75
# Median
median(X) = 5.05
median(Y) = 8.5
# Standard dev.
SD(X) = 1.29577
SD(Y) = 1.71226
# Variance
SD(X)^2 = 1.67902
SD(Y)^2 = 2.93182
# Regression Statistics
# Intercept
b[0] := intercept(X, Y)
b[0] = 1.72359
# Slope
b[1] := slope(X, Y)
b[1] = 1.28728
# Correlation coeff.
corr(X, Y) = 0.974164
# R^2
corr(X, Y)^2 = 0.948995
# Covariance
cvar(X, Y) = 1.98125
# Standard Error
stderr(X, Y) = 0.405574
# Plots
r(x) := b[0] + b[1]*x
scale := max(vectorize(|r(X) - Y|))*1.1
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