# Вариант 2
# Задание 2
# Хлебникова, Плотникова
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# Описание ситуации с помощью цепи Маркова и обоснование модели:
# Ситуация: Частица движется по вершинам правильного четырехугольника A1, А2, А3, А4, переходя на каждом шаге в одну из двух соседних вершин с вероятностью 0,5.
#
# Цепь Маркова: Данная система является цепью Маркова, так как:
# - Вершины А1, А2, А3, А4 представляют собой конечное множество состояний.
# - Вероятность перехода в следующее состояние зависит только от текущего положения частицы и не зависит от предыдущей истории.
# Матрица перехода | Орграф
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P := [0, 0.5, 0, 0.5; 0.5, 0, 0.5, 0; 0, 0.5, 0, 0.5; 0.5, 0, 0.5, 0]
# Характеристика состояний:
# Эргодическая - нет поглощающих состояний
# Нерегулярная
# Последовательно возводим матрицу в 5, 10 и 15 степень
P^5 = [0, 0.5, 0, 0.5; 0.5, 0, 0.5, 0; 0, 0.5, 0, 0.5; 0.5, 0, 0.5, 0]
P^10 = [0.5, 0, 0.5, 0; 0, 0.5, 0, 0.5; 0.5, 0, 0.5, 0; 0, 0.5, 0, 0.5]
P^15 = [0, 0.5, 0, 0.5; 0.5, 0, 0.5, 0; 0, 0.5, 0, 0.5; 0.5, 0, 0.5, 0]
# Видим, что при возведении в четную и нечетную степени матрица перехода меняется. Это говорит о том, что ЦМ не является регулярной, стационарного режима не существует, вектор предельных вероятностей не может быть найден.
# Найдем вектор предельных вероятностей
# U^T = [u1 u2 u3 u4]
u1 := 0
u2 := 0
u3 := 0
u4 := 0
Given
u1 == 0.5*u2 + 0.5*u4
u2 == 0.5*u1 + 0.5*u3
u3 == 0.5*u2 + 0.5*u4
u4 == 0.5*u1 + 0.5*u3
u1 + u2 + u3 + u4 == 1
R := Find(u1, u2, u3, u4)
R = [0.25; 0.25; 0.25; 0.25]
