# Вариант 2
# Задание 2
# Хлебникова, Плотникова
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ORIGIN := 1
# Ориентированный граф
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P := [1, 0, 0, 0; 1/4, 0, 1/2, 1/4; 2/3, 1/3, 0, 0; 0, 0, 0, 1]  # -  Матрица перехода ЦМ
# Канонический вид матрицы перехода ЦМ
P := [1, 0, 0, 0; 0, 1, 0, 0; 2/3, 0, 0, 1/3; 1/4, 1/4, 1/2, 0]
E := [1, 0; 0, 1]  # -  Единичная матрица
Q := [0, 1/3; 1/2, 0]  # -  Матрица, содержащая вероятности перехода из непоглощающего состояния в непоглощающее.
R := [2/3, 0; 1/4, 1/4]  # -  Матрица, содержащая вероятности перехода из непоглощающего состояния в поглощающее
# Находим фундаментальную матрицу
N := (E - Q)^-1 = [1.2, 0.4; 0.6, 1.2]
# Фундаментальная матрица N описывает среднее число посещений каждого непоглощающего состояния до момента поглощения. В данной задаче:
# - Непоглощающие состояния: 2, 3
# - Поглощающие состояния: 1, 4
# Строки соответствуют начальному непоглощающему состоянию цепи:
# - Первая строка → состояние 2,
# - Вторая строка → состояние 3.
#
# Столбцы соответствуют непоглощающим состояниям, которые посещает цепь до поглощения:
# - Первый столбец → состояние 2,
# - Второй столбец → состояние 3.
3/5 + 6/5 = 1.8  # - Среднее количество шагов до поглощения
B := N*R = [0.9, 0.1; 0.7, 0.3]  # -  Вероятность перехода в заданное поглощающее состояние
