# Лаб. работа #7, Вариант 9.
#
# 424-1, Бадулин Илья, Ушаков Максим.
# Задание 1
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# Описание ситуации с помощью цепи Маркова и обоснование модели:
#
# Ситуация: Происходит случайное блуждание частицы по точкам A1=1, A2=2, A3=3, A4=4. Точки A1 и A4 являются отражающими экранами (из A1 частица гарантированно переходит в A2, а из A4 - в A3). Из внутренних точек (A2, A3) частица переходит вправо с вероятностью 0,4 и влево с вероятностью 0,6.
#
# Цепь Маркова: Данная система является цепью Маркова, так как:
# - Вершины A1, A2, A3, A4 представляют собой конечное множество состояний.
# - Вероятность перехода в следующее состояние зависит только от текущего положения частицы и не зависит от ее предыдущей истории
# Матрица перехода
P := [0, 1, 0, 0; 0.6, 0, 0.4, 0; 0, 0.6, 0, 0.4; 0, 0, 1, 0]
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Орграф
# Характеристика состояний:
#
# Эргодическая - так как нет поглощающих состояний и из любого состояния можно попасть в любое другое.
#
# Нерегулярная (периодическая) - частица совершает переходы только между соседними узлами. Из-за этого на четных шагах частица возвращается к той же четности узлов, а на нечетных меняет ее.
# Исследование поведения системы при t -> ∞
#
# Последовательно возводим матрицу в 5, 10 и 15 степень
P^5 = [0, 0.8016, 0, 0.1984; 0.48096, 0, 0.51904, 0; 0, 0.77856, 0, 0.22144; 0.4464, 0, 0.5536, 0]
P^10 = [
    0.474103, 0, 0.525897, 0;
    0, 0.789641, 0, 0.210359;
    0.473307, 0, 0.526693, 0;
    0, 0.788845, 0, 0.211155
]
P^15 = [
    0, 0.789483, 0, 0.210517;
    0.47369, 0, 0.52631, 0;
    0, 0.789465, 0, 0.210535;
    0.473662, 0, 0.526338, 0
]
# Видим, что при возведении в четную и нечетную степени матрица перехода кардинально меняется. Это подтверждает, что ЦМ не является регулярной (имеет период 2), стационарного режима в строгом смысле не существует, а матрица не сходится к единой предельной матрице (вектор предельных вероятностей не может быть найден).
# Найдем вектор предельных вероятностей
# (долю времени, которую частица проводит в каждом состоянии в долгосрочной перспективе)
# U^T = [u1 u2 u3 u4]
u1 := 0
u2 := 0
u3 := 0
u4 := 0
Given
u1 == 0.6*u2
u2 == 1*u1 + 0.6*u3
u3 == 0.4*u2 + 1*u4
u4 == 0.4*u3
u1 + u2 + u3 + u4 == 1
R := Find(u1, u2, u3, u4)
R = [0.236842; 0.394737; 0.263158; 0.105263]
# Задание 2
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# По исходной матрице P мы видим, что состояния 2 и 3 являются поглощающими (из них вероятность перехода в самих себя равна 1, а в другие - 0). Состояния 1 и 4 - непоглощающие (переходные).
ORIGIN := 1
# Ориентированный граф
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P := [1/5, 3/5, 1/5, 0; 0, 1, 0, 0; 0, 0, 1, 0; 0, 1/6, 1/3, 1/2]  # Матрица перехода ЦМ
# Канонический вид матрицы перехода ЦМ
# Верхний левый блок - единичная матрица; нижний левый - матрица R; нижний правый - матрица Q)
P := [1, 0, 0, 0; 0, 1, 0, 0; 3/5, 1/5, 1/5, 0; 1/6, 1/3, 0, 1/2]
E := [1, 0; 0, 1]  # Единичная матрица
Q := [1/5, 0; 0, 1/2]  # Матрица, содержащая вероятности перехода из непоглощающего состояния в непоглощающее.
R := [3/5, 1/5; 1/6, 1/3]  # Матрица, содержащая вероятности перехода из непоглощающего состояния в поглощающее
# Находим фундаментальную матрицу N
N := (E - Q)^-1 = [1.25, 0; 0, 2]
# Фундаментальная матрица N описывает среднее число посещений каждого непоглощающего состояния до момента поглощения. В данной задаче:
# - Непоглощающие состояния: 1, 4
# - Поглощающие состояния: 2, 3
# Строки соответствуют начальному непоглощающему состоянию цепи:
# - Первая строка → состояние 1,
# - Вторая строка → состояние 4.
#
# Столбцы соответствуют непоглощающим состояниям, которые посещает цепь до поглощения:
# - Первый столбец → состояние 1,
# - Второй столбец → состояние 4.
# Среднее количество шагов до поглощения из состояния 1:
5/4 + 0 = 1.25
# Среднее количество шагов до поглощения из состояния 4:
0 + 2 = 2
# Нахождение матрицы B (вероятности поглощения)
B := N*R = [0.75, 0.25; 0.333333, 0.666667]  # Вероятность перехода в заданное поглощающее состояние
# "Какую информацию о цепи Маркова содержат эти матрицы?"
#
# Фундаментальная матрица N:
# Элемент n_ij этой матрицы показывает среднее количество раз, которое процесс побывает в непоглощающем (переходном) состоянии j, при условии, что он стартовал из непоглощающего состояния i. Сумма элементов по i-й строке показывает среднее время (количество шагов) до того момента, как процесс попадет в любое из поглощающих состояний.
#
# Матрица B:
# Элемент b_ij показывает вероятность того, что процесс, стартовавший в непоглощающем состоянии i, в конечном итоге завершится (будет поглощен) именно в поглощающем состоянии j. (Сумма вероятностей в каждой строке матрицы B всегда равна 1).
